# -*- coding: utf-8 -*-
import Sofa.Core
import Sofa.constants.Key as Key
from stlib3.physics.deformable import ElasticMaterialObject
from stlib3.physics.constraints import FixedBox
from softrobots.actuators import PullingCable
from stlib3.physics.collision import CollisionMesh
from splib3.loaders import loadPointListFromFile


class SphereController(Sofa.Core.Controller):
    def __init__(self, *args, **kwargs):
        Sofa.Core.Controller.__init__(self, args, kwargs)
        self.cable = args[0]
        self.name = "SphereController"

    def onKeypressedEvent(self, e):
        displacement = self.cable.CableConstraint.value[0]
        if e["key"] == Key.plus:
            displacement += 1.

        elif e["key"] == Key.minus:
            displacement -= 1.
            if displacement < 0:
                displacement = 0
        self.cable.CableConstraint.value = [displacement]


def Sphere(parentNode=None, name="Sphere",
           rotation=[0.0, 0.0, 0.0], translation=[0.0, 0.0, 0.0],
           fixingBox=[0.5, 0.5, -0.5, 1.5, 1.5, 0.5],
           pullPointLocation=[5.0, 0.0, 0.0]):
    Sphere= parentNode.addChild(name)
    eobject = ElasticMaterialObject(Sphere,
                                    volumeMeshFileName="sphere0.vtu",
                                    poissonRatio=0.3,
                                    youngModulus=18000,
                                    totalMass=0.5,
                                    surfaceColor=[0.0, 0.8, 0.7, 1.0],
                                    surfaceMeshFileName="ball.obj",
                                    rotation=rotation,
                                    translation=translation)
    Sphere.addChild(eobject)

    FixedBox(eobject, atPositions=fixingBox, doVisualization=True)

    cable = PullingCable(eobject,
                         "PullingCable",
                         pullPointLocation=pullPointLocation,
                         rotation=rotation,
                         translation=translation,
                         cableGeometry = [[1.0, 0.0, 0.0]])
    eobject.addObject(SphereController(cable))

    CollisionMesh(eobject, name="CollisionMesh",
                  surfaceMeshFileName="ball.obj",
                  rotation=rotation, translation=translation,
                  collisionGroup=[1, 2])


    return Sphere


def createScene(rootNode):
    from stlib3.scene import MainHeader, ContactHeader

    MainHeader(rootNode, gravity=[0.0, -981.0, 0.0], plugins=["SoftRobots"])
    ContactHeader(rootNode, alarmDistance=4, contactDistance=3, frictionCoef=0.08)
    rootNode.VisualStyle.displayFlags = "showBehavior showCollisionModels"

    Sphere(rootNode, translation=[1.0, 0.0, 0.0])
    return rootNode
