# -*- coding: utf-8 -*-

import Sofa
import os
import Sofa.Core #contains controller class
import Sofa.constants.Key as Key


from stlib3.scene import Scene
# A prefab that implements an ElasticMaterialObject
from stlib3.physics.deformable import ElasticMaterialObject
from stlib3.visuals import VisualModel
from softrobots.actuators import PullingCable

class fingerController(Sofa.Core.Controller):
    def __init__(self,*args, **kwargs):
        Sofa.Core.Controller.__init__(self, args, kwargs)
        self.cable = args[0]
        self.name = 'FingerController'

    def onKeypressedEvent(self, e):
        displacement = self.cable.CableConstraint.value[0]
        if e["key"] == Key.plus:
            displacement += 1

        elif e["key"] == Key.minus:
            displacement -= 1
            if displacement <0:
                displacement = 0
        self.cable.CableConstraint.value = [displacement]


def createScene(rootNode):
    rootNode.addObject("RequiredPlugin",
                       pluginName=["SoftRobots", 'SofaConstraint', 'SofaEngine', 'SofaLoader', 'SofaDeformable', 'ModelOrderReduction'])
    scene = Scene(rootNode, gravity=[0.0, -9810.0, 0.0], dt=0.01)
    scene.VisualStyle.displayFlags='showBehavior'

    rootNode.addObject("FreeMotionAnimationLoop")
    rootNode.addObject("GenericConstraintSolver", maxIterations=1000, tolerance=0.001)

    finger = ElasticMaterialObject(rootNode,name="finger",
                                   volumeMeshFileName="finger.vtk",
                                   poissonRatio=0.45,
                                   youngModulus=600,
                                   totalMass=0.05)
    rootNode.addChild(finger)

    #finger = rootNode.addChild('finger')
    #finger.addObject('EulerImplicitSolver', rayleighStiffness = 0.0, rayleighMass = 0.0)
    #finger.addObject('SparseLDLSolver',template="CompressedRowSparseMatrixMat3x3d")
    #finger.addObject('MeshVTKLoader', name="loader", filename='finger.vtk')
    #finger.addObject('TetrahedronSetTopologyContainer', src="@loader")
    #finger.addObject('MechanicalObject')
    #finger.addObject('UniformMass', totalMass=0.05)
    #finger.addObject('TetrahedronFEMForceField', poissonRatio="0.45", youngModulus="600")
    #finger.addObject('GenericConstraintCorrection')

    # To facilitate the selection of DoFs, SOFA has a concept called ROI (Region of Interest).
    # The idea is that ROI component "select" all DoFS that are enclosed by their "region".
    # We use ROI here to select a group of finger's DoFs that will be constrained to stay
    # at a fixed position.
    # You can either use "BoxROI"...
    finger.addObject('BoxROI', name='ROI1', box=[-15, 0, 0, 5, 10, 15], drawBoxes=True)
    # Or "SphereROI"...
    # finger.addObject('SphereROI', name='ROI', centers='0 0 0', radii='5')

    # RestShapeSpringsForceField is one way in Sofa to implement fixed point constraint.
    # Here the constraints are applied to the DoFs selected by the previously defined BoxROI
    finger.addObject('RestShapeSpringsForceField', points='@ROI1.indices', stiffness=1e12)

    ##########################################
    # Cable                                  #
    ##########################################

    #  This adds a new node in the scene. This node is appended to the finger's node.
    #cable = finger.addChild('cable')

    # This adds a MechanicalObject, a component holding the degree of freedom of our
    # mechanical modelling. In the case of a cable it is a set of positions specifying
    # the points where the cable is passing by.
    #cable.addObject('MechanicalObject',
    #                position=[
    #                    [-17.5, 12.5, 2.5],
    #                    [-32.5, 12.5, 2.5],
    #                    [-47.5, 12.5, 2.5],
    #                    [-62.5, 12.5, 2.5],
    #                    [-77.5, 12.5, 2.5],
    #
    #                    [-83.5, 12.5, 4.5],
    #                    [-85.5, 12.5, 6.5],
    #                    [-85.5, 12.5, 8.5],
    #                    [-83.5, 12.5, 10.5],
    #
    #                    [-77.5, 12.5, 12.5],
    #                    [-62.5, 12.5, 12.5],
    #                    [-47.5, 12.5, 12.5],
    #                    [-32.5, 12.5, 12.5],
    #                    [-17.5, 12.5, 12.5]])

    # add a CableConstraint object with a name.
    # the indices are referring to the MechanicalObject's positions.
    # The last index is where the pullPoint is connected.
    #cable.addObject('CableConstraint', name="cable",
    #                indices=list(range(0, 14)),
    #                pullPoint=[0.0, 12.5, 2.5])

    # This adds a BarycentricMapping. A BarycentricMapping is a key element as it will add a bidirectional link
    # between the cable's DoFs and the finger's one's so that movements of the cable's DoFs will be mapped
    # to the finger and vice-versa;
    #cable.addObject('BarycentricMapping')

    cable = PullingCable(finger,
                        "PullingCable",
                        pullPointLocation=[0.0, 12.5, 12.5],
                        cableGeometry = [[-17.5, 12.5, 2.5],
                        [-32.5, 12.5, 2.5],
                        [-47.5, 12.5, 2.5],
                        [-62.5, 12.5, 2.5],
                        [-77.5, 12.5, 2.5],

                        [-83.5, 12.5, 4.5],
                        [-85.5, 12.5, 6.5],
                        [-85.5, 12.5, 8.5],
                        [-83.5, 12.5, 10.5],

                        [-77.5, 12.5, 12.5],
                        [-62.5, 12.5, 12.5],
                        [-47.5, 12.5, 12.5],
                        [-32.5, 12.5, 12.5],
                        [-17.5, 12.5, 12.5]])

    finger.addObject(fingerController(cable))

    return rootNode
